*Heading
** Job name: kk-1 Model name: Krishan
** Generated by: Abaqus/CAE 2021
*Preprint, echo=NO, model=NO, history=NO, contact=NO
**
** PARTS
**
*Part, name=ASample
*Node
      1,  0.280000001,           0.
      2,  0.277816981, 0.00438318541
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*Element, type=CGAX4R
   1,    1,    2,   38,   37
   2,    2,    3,   39,   38
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*Nset, nset=Sample-All, generate
    1,  4129,     1
*Elset, elset=Sample-All, generate
    1,  3958,     1
*Nset, nset=Sample-Top-Surface
   36,   72,  108,  144,  180,  216
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*Elset, elset=Sample-Top-Surface
   35,   70,  105,  140,  175,  210
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*Nset, nset=Sample-Bot-Surface
    1,   37,   73,  109,  145,  181
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*Elset, elset=Sample-Bot-Surface
    1,   36,   71,  106,  141,  176
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*Nset, nset=Sample-Sym-Axis, generate
 2557,  2592,     1
*Elset, elset=Sample-Sym-Axis, generate
 2451,  2485,     1
*Nset, nset=Con-Nodes
    1,   36,   37,   72,   73,  108
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** Section: Zirconium
*Solid Section, elset=Sample-All, controls=EC-1, material=Zirconium
,
*End Part
**
*Part, name=Bot-Anvil
*Node
      1,  0.017922705,   1.42999995
      2, 0.0358454101,   1.42999995
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*Element, type=CGAX4R
   1,  249,    1,  430,  367
   2,  249,  367,  335,   32
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*Nset, nset=Bot-Anvil-All, generate
    1,  3296,     1
*Elset, elset=Bot-Anvil-All, generate
    1,  3195,     1
*Nset, nset=Bot-Anvil-Seat
 1194, 1198, 1243, 1244, 1245, 1246
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*Elset, elset=Bot-Anvil-Seat
 1119, 1120, 1121, 1122, 1150, 1185
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*Nset, nset=Bot-Anvil-SymAxis
   32,   66,   67,   68,   69,   70
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*Elset, elset=Bot-Anvil-SymAxis
    2,    3,    4,    5,    9,   10
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** Section: Diamond
*Solid Section, elset=Bot-Anvil-All, controls=EC-1, material=Diamond
,
*End Part
**
*Part, name=Top-Anvil
*Node
      1, 0.0175000001,  -1.57500005
      2, 0.0262499992,  -1.57500005
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*Element, type=CGAX4R
  1, 210,  31, 737, 736
  2,  30, 277, 737,  31
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*Nset, nset=Top-Anvil-All, generate
    1,  2642,     1
*Elset, elset=Top-Anvil-All, generate
    1,  2550,     1
*Nset, nset=Top-Anvil-Seat
 879, 880, 881, 882, 883, 884
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*Elset, elset=Top-Anvil-Seat
  785,  834,  835,  836,  868,  869
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*Nset, nset=Top-Anvil-SymAxis
  32,  34,  35,  36,  37,  38
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*Elset, elset=Top-Anvil-SymAxis
  106,  108,  110,  120,  125,  129
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** Section: Diamond
*Solid Section, elset=Top-Anvil-All, controls=EC-1, material=Diamond
,
*End Part
**
**
** ASSEMBLY
**
*Assembly, name=Assembly
**
*Instance, name=ASample-1, part=ASample
*End Instance
**
*Instance, name=Bot-Anvil-1, part=Bot-Anvil
          0.,         -1.6,           0.
*End Instance
**
*Instance, name=Top-Anvil-1, part=Top-Anvil
          0.,         1.89,           0.
*End Instance
**
*Elset, elset=_Bot-Anvil-Sur_S3, internal, instance=Bot-Anvil-1
   10,   29,   30,   42,  157,  172
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*Elset, elset=_Bot-Anvil-Sur_S1, internal, instance=Bot-Anvil-1
   20,   28,   31,   40,   41,  161
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*Elset, elset=_Bot-Anvil-Sur_S4, internal, instance=Bot-Anvil-1
   24,   25,  457,  562, 1954
*Elset, elset=_Bot-Anvil-Sur_S2, internal, instance=Bot-Anvil-1
 415,
*Surface, type=ELEMENT, name=Bot-Anvil-Sur
_Bot-Anvil-Sur_S3, S3
_Bot-Anvil-Sur_S1, S1
_Bot-Anvil-Sur_S4, S4
_Bot-Anvil-Sur_S2, S2
*Elset, elset=_Sample-Bot-Sur_S4, internal, instance=ASample-1
    1,   36,   71,  106,  141,  176
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*Elset, elset=_Sample-Bot-Sur_S3, internal, instance=ASample-1
 2490, 2492, 2493, 2508, 2511, 2513
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*Elset, elset=_Sample-Bot-Sur_S1, internal, instance=ASample-1
 2587, 2686, 2703, 2726, 2727, 2728, 2729, 2831, 2839, 3860, 3880
*Elset, elset=_Sample-Bot-Sur_S2, internal, instance=ASample-1
 2594,
*Surface, type=ELEMENT, name=Sample-Bot-Sur
_Sample-Bot-Sur_S4, S4
_Sample-Bot-Sur_S3, S3
_Sample-Bot-Sur_S2, S2
_Sample-Bot-Sur_S1, S1
*Elset, elset=_Sample-Top-Sur_S2, internal, instance=ASample-1
   35,   70,  105,  140,  175,  210
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*Elset, elset=_Sample-Top-Sur_S4, internal, instance=ASample-1
 2496, 2498, 2516, 2522, 2529, 2534
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*Elset, elset=_Sample-Top-Sur_S3, internal, instance=ASample-1
 2528, 2614
*Elset, elset=_Sample-Top-Sur_S1, internal, instance=ASample-1
 2570, 2602, 2605, 2610, 2619, 2733, 2734
*Surface, type=ELEMENT, name=Sample-Top-Sur
_Sample-Top-Sur_S2, S2
_Sample-Top-Sur_S4, S4
_Sample-Top-Sur_S3, S3
_Sample-Top-Sur_S1, S1
*Elset, elset=_Top-Anvil-Sur_S1, internal, instance=Top-Anvil-1
   3,  50,  52,  68,  83,  85
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*Elset, elset=_Top-Anvil-Sur_S3, internal, instance=Top-Anvil-1
  67, 135, 158, 166, 292, 302, 307, 309
*Elset, elset=_Top-Anvil-Sur_S2, internal, instance=Top-Anvil-1
    7,    8,   10,   22,   33,  175
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*Elset, elset=_Top-Anvil-Sur_S4, internal, instance=Top-Anvil-1
    4,    5,   23,   24,   32,  173
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*Surface, type=ELEMENT, name=Top-Anvil-Sur
_Top-Anvil-Sur_S1, S1
_Top-Anvil-Sur_S3, S3
_Top-Anvil-Sur_S2, S2
_Top-Anvil-Sur_S4, S4
*End Assembly
**
** ELEMENT CONTROLS
**
*Section Controls, name=EC-1, hourglass=ENHANCED
1., 1., 1.
**
** MATERIALS
**
*Material, name=Diamond
*Depvar
      1,
*User Material, constants=21
 1.0819e+12,  1.252e+11,  5.786e+11, -7.611e+12, -1.637e+12,   6.04e+11,  -1.99e+11, -2.799e+12
 -2.799e+12, -1.148e+12, 2.6687e+13,  9.459e+12,  6.074e+12,  -4.25e+11, -1.385e+12, 1.0741e+13
  -2.64e+11,  8.192e+12,   4.87e+11, 1.1328e+13,   5.28e+11
*User Output Variables
      1,
*Material, name=Zirconium
*Depvar
     100,
*User Material, constants=65
 6.811e+10,   3.613e+10, -1.4701e+11, -1.2275e+11,      -1e+11,   7.233e+10,    4.51e+10, -1.4956e+11
 -1.7953e+11,      -4e+09,  8.2782e+08,     0.18779, 1.66940e+09,     0.07386,       0.165,     0.16477
       0.163,     0.15432,     0.14313,     0.12844,     0.11882,     0.11217,     0.10518,    0.096852
    0.091421,    0.087008,    0.080639,    0.076394,    0.068753,    0.058392,    0.054014,    0.048949
    0.046396,    0.043092,    0.039124,    0.037096,    0.033383,     0.03107,    0.030553,    0.028457
     -0.0158,          0.,          0.,          0.,          0.,          0.,          0.,          0.
          0.,          0.,          0.,          0.,          0.,          0.,          0.,          0.
          0.,          0.,          0.,          0.,          0.,          0.,          0.,          0.
          0.,
*User Output Variables
      1,
**
** INTERACTION PROPERTIES
**
*Surface Interaction, name=Fric
1.,
*Friction, user, depvar=10, properties=32
 0.3,     0.3,      0.,      0., 0.19004, 0.08338, 0.165, 0.16477
 0.163,     0.15432,     0.14313,     0.12844,     0.11882,     0.11217,     0.10518,    0.096852
 0.091421,    0.087008,    0.080639,    0.076394,    0.068753,    0.058392,    0.054014,    0.048949
 0.046396,    0.043092,    0.039124,    0.037096,    0.033383,     0.03107,    0.030553,    0.028457
*Surface Behavior, no separation, pressure-overclosure=HARD
*Surface Interaction, name=NoFric
1.,
*Friction
0.,
*Surface Behavior, pressure-overclosure=HARD
**
** BOUNDARY CONDITIONS
**
** Name: Bot-Anvil-SymAxis Type: Displacement/Rotation
*Boundary
Bot-Anvil-1.Bot-Anvil-SymAxis, 1, 1
Bot-Anvil-1.Bot-Anvil-SymAxis, 5, 5
Bot-Anvil-1.Bot-Anvil-SymAxis, 6, 6
** Name: Fixed-Bot Type: Displacement/Rotation
*Boundary
Bot-Anvil-1.Bot-Anvil-Seat, 1, 1
Bot-Anvil-1.Bot-Anvil-Seat, 2, 2
Bot-Anvil-1.Bot-Anvil-Seat, 5, 5
Bot-Anvil-1.Bot-Anvil-Seat, 6, 6
** Name: Fixed-Top Type: Displacement/Rotation
*Boundary
Top-Anvil-1.Top-Anvil-Seat, 1, 1
Top-Anvil-1.Top-Anvil-Seat, 5, 5
Top-Anvil-1.Top-Anvil-Seat, 6, 6
** Name: Sample-Sym-Axis Type: Displacement/Rotation
*Boundary
ASample-1.Sample-Sym-Axis, 1, 1
ASample-1.Sample-Sym-Axis, 5, 5
ASample-1.Sample-Sym-Axis, 6, 6
** Name: Top-Anvil-SymAxis Type: Displacement/Rotation
*Boundary
Top-Anvil-1.Top-Anvil-SymAxis, 1, 1
Top-Anvil-1.Top-Anvil-SymAxis, 5, 5
Top-Anvil-1.Top-Anvil-SymAxis, 6, 6
**
** INTERACTIONS
**
** Interaction: Con-Pair-1
*Contact Pair, interaction=Fric, type=SURFACE TO SURFACE
Sample-Top-Sur, Top-Anvil-Sur
** Interaction: Con-Pair-2
*Contact Pair, interaction=Fric, type=SURFACE TO SURFACE
Sample-Bot-Sur, Bot-Anvil-Sur
** ----------------------------------------------------------------
**
** STEP: Pres-Disp
**
*Step, name=Pres-Disp, nlgeom=YES, inc=1000001
Prescribed displacement
*Static
0.0001, 1., 1e-06, 0.0004
*Solution Technique, type=QUASI-NEWTON
**
** BOUNDARY CONDITIONS
**
** Name: Dis-Top Type: Displacement/Rotation
*Boundary
Top-Anvil-1.Top-Anvil-Seat, 1, 1
Top-Anvil-1.Top-Anvil-Seat, 2, 2, -0.15
Top-Anvil-1.Top-Anvil-Seat, 5, 5
Top-Anvil-1.Top-Anvil-Seat, 6, 6
**
** OUTPUT REQUESTS
**
*Restart, write, frequency=0
*Print, plasticity=YES
**
** FIELD OUTPUT: F-Output-1
**
*Output, field, frequency=5
*Node Output
COORD, U
*Element Output, directions=YES
ELEDEN, ELEN, ENER, S, SDV, UVARM
*Contact Output
CDISP, CSTATUS, CSTRESS
**
** HISTORY OUTPUT: H-Output-1
**
*Output, history, frequency=5
*Energy Output
ALLIE, ALLSD, ALLVD
*End Step
